<?xml version="1.0" ?>
<Node name="root" dt="0.01" gravity="0 0 0" animate="0">
    <RequiredPlugin name="SofaOpenglVisual"/>
    <!-- Basic Components to perform the collision detection -->
    <VisualStyle displayFlags="showBehavior showCollisionModels" />
    <ClipPlane position="0 0 0" normal="0 0 1" active="1"/>
    <FreeMotionAnimationLoop name="FreeMotionAnimationLoop" />

    <!-- Using a rigid cube using collision triangles, lines and points  -->
    <Node name="Cube1">
        <EulerImplicitIntegrationScheme name="EulerImplicit"  rayleighStiffness="0.1" rayleighMass="0.1" />
        <CGLinearSolver iterations="25" tolerance="1e-5" threshold="1e-5" name="CG Solver"/>
        <MechanicalObject name="Cube1 RigidDOF" template="Rigid3d" dy="0" />
        <UniformMass name="UniformMass1" totalMass="10.0" />
        <UncoupledConstraintCorrection />
        <Node name="Visual Model1">
            <OglModel name="Visual Cube1" filename="mesh/cube.obj" color="1 1 0 1.0" />
            <RigidMapping name="RigidMapping Visual-RigidDOF" object1="../../Cube1 RigidDOF" object2="Visual Cube1" />
        </Node>
<!--        <Node name="Collision Model1">
            <MeshTopology name="Cube1 Mesh" filename="mesh/cube.obj" />
            <MechanicalObject name="Collision Cube1" />
            <TriangleCollisionModel name="TriangleModel1" />
            <LineCollisionModel name="Cube1 Edge For Collision" />
            <PointCollisionModel name="Cube1 Point For Collision" />
            <RigidMapping name="RigidMapping Collision-RigidDOF" object1="../../Cube1 RigidDOF" object2="Collision Cube1" />
        </Node>-->
    </Node>
    <Node name="Cube2">
        <EulerImplicitIntegrationScheme name="EulerImplicit" />
        <CGLinearSolver iterations="25" tolerance="1e-5" threshold="1e-5" name="CG Solver"/>
        <MechanicalObject name="Cube2 RigidDOF" template="Rigid3d" dy="0" dx="0" />
        <UniformMass name="UniformMass2" totalMass="10.0" />
        <UncoupledConstraintCorrection />
        <Node name="Visual Model2">
            <OglModel name="Visual Cube2" filename="mesh/cube.obj" color="1 1 0 1.0" scale="2 2 2"/>
            <RigidMapping name="RigidMapping Visual-RigidDOF" object1="../../Cube2 RigidDOF" object2="Visual Cube2" />
        </Node>
<!--        <Node name="Collision Model2">
            <MeshTopology name="Cube Mesh2" filename="mesh/cube.obj" />
            <MechanicalObject name="Collision Cube2" scale="2 2 2" />
            <TriangleCollisionModel name="TriangleModel2" />
            <LineCollisionModel name="Cube2 Edge For Collision" />
            <PointCollisionModel name="Cube2 Point For Collision" />
            <RigidMapping name="RigidMapping Collision-RigidDOF" object1="../../Cube2 RigidDOF" object2="Collision Cube2" />
        </Node>-->
    </Node>
</Node>
