<?xml version="1.0"?>
<Node name="Scene" gravity="0 0 0" dt="1"  >
    <RequiredPlugin name="SofaOpenglVisual"/>
	<RequiredPlugin name="Registration" pluginName="Registration" />

	<VisualStyle displayFlags="showForceFields showVisual" />

	<EulerImplicitIntegrationScheme rayleighStiffness="0.5"  rayleighMass="0.5" />
	<CGLinearSolver template="GraphScattered" iterations="25"  threshold="1e-008" tolerance="1e-5"/>

	<Node name="target">
			<MeshOBJLoader name="meshLoader_1" filename="data/femur_f.obj" handleSeams="1" />
			<OglModel name="Bone" src="@meshLoader_1"  color="0.5 .4 1 1" />
	</Node>

	<Node name="source">
			<MeshOBJLoader name="meshLoader" filename="data/femur_m_res.obj"/>
			<MeshTopology src="@meshLoader" />
			<MechanicalObject  name="PointSet"   />
			<UniformMass vertexMass="10"/>

			<ClusteringEngine template="Vec3d" name="clustering" radius='0.4'  number='100' position="@meshLoader.position"/>
			<ShapeMatching template="Vec3d" name="shapeMatching" iterations='1' position="@PointSet.position" cluster="@clustering.cluster"/>
			<PositionBasedDynamicsConstraint template="Vec3d" stiffness = '1' position="@shapeMatching.targetPosition"/>

			<NormalsFromPoints name="NormalsFromPoints" template="Vec3d" position="@PointSet.position" triangles="@meshLoader.triangles" quads="@meshLoader.quads"/>

			<ClosestPointRegistrationForceField template="Vec3d"
					sourceTriangles="@meshLoader.triangles"
					sourceNormals="@NormalsFromPoints.normals"
					position="@../target/Bone.position"
					triangles="@../target/Bone.triangles"
					normals="@../target/Bone.normal"
					cacheSize="4"
					stiffness="1" damping="0" />
		<Node name="Visu">
			<MeshOBJLoader name="meshLoader_0" filename="data/femur_m.obj" handleSeams="1" />
			<OglModel name="Visual" src="@meshLoader_0" normals="0"   color="1 .4 0.5 1" />
			<BarycentricMapping input="@.." output="@Visual" />
		</Node>
	</Node>


</Node>
