<?xml version="1.0"?>
<Node name="root" gravity="0 0 0" dt="1">
	<RequiredPlugin name="Registration" pluginName="Registration" />
	<RequiredPlugin name="Image" pluginName="image" />
    <RequiredPlugin pluginName="Sofa.Component.Constraint.Projective"/> <!-- Needed to use components [PositionBasedDynamicsProjectiveConstraint] -->
    <RequiredPlugin pluginName="Sofa.Component.Engine.Analyze"/> <!-- Needed to use components [ClusteringEngine,ShapeMatching] -->
    <RequiredPlugin pluginName="Sofa.Component.Engine.Generate"/> <!-- Needed to use components [NormalsFromPoints] -->
    <RequiredPlugin pluginName="Sofa.Component.IO.Mesh"/> <!-- Needed to use components [MeshOBJLoader] -->
    <RequiredPlugin pluginName="Sofa.Component.LinearSolver.Iterative"/> <!-- Needed to use components [CGLinearSolver] -->
    <RequiredPlugin pluginName="Sofa.Component.Mapping.Linear"/> <!-- Needed to use components [BarycentricMapping] -->
    <RequiredPlugin pluginName="Sofa.Component.Mass"/> <!-- Needed to use components [UniformMass] -->
    <RequiredPlugin pluginName="Sofa.Component.IntegrationSchemes.Backward"/> <!-- Needed to use components [EulerImplicitIntegrationScheme] -->
    <RequiredPlugin pluginName="Sofa.Component.SceneUtility"/> <!-- Needed to use components [InfoComponent] -->
    <RequiredPlugin pluginName="Sofa.Component.StateContainer"/> <!-- Needed to use components [MechanicalObject] -->
    <RequiredPlugin pluginName="Sofa.Component.Topology.Container.Constant"/> <!-- Needed to use components [MeshTopology] -->
    <RequiredPlugin pluginName="Sofa.Component.Visual"/> <!-- Needed to use components [VisualStyle] -->
    <RequiredPlugin pluginName="Sofa.GL.Component.Rendering3D"/> <!-- Needed to use components [OglModel] -->


    <DefaultAnimationLoop />

    <VisualStyle displayFlags="showForceFields showVisual" />

    <EulerImplicitIntegrationScheme rayleighStiffness="0.2"  rayleighMass="0.2" />
    <CGLinearSolver template="GraphScattered" iterations="25"  threshold="1e-008" tolerance="1e-5"/>

    <Node name="target">
        <ImageContainer  name="image" filename="data/thigh.raw"/>
        <ImageFilter  name="filter" filter="1" param="0.5" src="@image" />
        <ImageViewer  name="viewer" src="@filter" plane="-1 108 20"/>
    </Node>

    <Node name="source">
        <ImageContainer  name="rimage" filename="data/thigh_m.raw" drawBB="false"/>

        <MeshOBJLoader name="meshLoader" filename="data/femur_m.obj"/>
        <MeshTopology src="@meshLoader" />
        <MechanicalObject  name="PointSet"   />
        <UniformMass vertexMass="10"/>

        <ClusteringEngine template="Vec3d" name="clustering" radius='0.4'  number='100' position="@meshLoader.position"/>
        <ShapeMatching template="Vec3d" name="shapeMatching" iterations='1' position="@PointSet.position" cluster="@clustering.cluster"/>
        <PositionBasedDynamicsProjectiveConstraint template="Vec3d" stiffness = '1' position="@shapeMatching.targetPosition"/>

        <NormalsFromPoints name="NormalsFromPoints" template="Vec3d" position="@PointSet.position" triangles="@meshLoader.triangles" quads="@meshLoader.quads"/>
        <IntensityProfileRegistrationForceField  name="ipff" template="Vec3d,ImageUC"
                image="@../target/filter.outputImage" transform="@../target/filter.outputTransform"
		refImage="@rimage.image" refTransform="@rimage.transform"
                directions="@NormalsFromPoints.normals"
                stiffness="1" damping="0" threshold="0.5" step="0.02" sizes="10 5" searchRange="5" measure="1" useAnisotropicStiffness="0"/>
<!--        <ImageViewer  name="view_refprof"  image="@ipff.refProfiles" transform="5 0 0 0 0 0 .1 .01 .1 0 1 0"/>-->
<!--        <ImageViewer  name="view_prof"  image="@ipff.profiles" transform="1 0 0 0 0 0 .1 .01 .1 0 1 0"/>-->
<!--        <ImageViewer template="ImageD" name="view_simi"  image="@ipff.similarity" transform="10 0 0 0 0 0 .1 .01 .1 0 1 0"/>-->

        <Node name="Visu">
            <MeshOBJLoader name="meshLoader_0" filename="data/femur_m.obj" handleSeams="1" />
            <OglModel name="Visual" src="@meshLoader_0" normals="0"   color="0.8 0.5 0.5 1" />
            <BarycentricMapping input="@.." output="@Visual" />
        </Node>
    </Node>
</Node>
